Mon Aug 26 03:57:30 PM UTC 2024
$PROBLEM NM TRIANING BASE MODEL
;DV: mcg/mL
;TIME: day
;CL  : L/d
;VC   : L

$DATA ../../../data/derived/PK_Data_v01.csv IGNORE = @

$INPUT C LINE ID TIME AMT RATE DV EVID MDV CMT LLOQ BLQ DOSEN COHORT BWT BAGE BALB SEXF RACEN COHORTC=DROP SEXC=DROP RACEC=DROP

$SUBROUTINE ADVAN6 TRANS1 TOL=6 ;general DiffEq solver

$MODEL
  COMP = (CENTRAL) ;central: CMT = 1

$PK
TVCL = THETA(1) ;Typical value clearance
CL = TVCL * EXP(ETA(1)) ;Individual clearance value

TVVC = THETA(2) ;Typical value central compartment volume
VC = TVVC * EXP(ETA(2)) ;Individual Vc

S1 = VC * 1; mg/L == ug/mL

K10 = CL / VC ; clearance rate, (L/d / L = 1/d)

$DES
DADT(1) = -K10*A(1)

$ERROR (OBSERVATION ONLY)
IPRED = F
W = SQRT(SIGMA(1)*F*F + SIGMA(2)) ;variance on (y = F + eps(1) + Feps(2))
IRES = DV-IPRED
IWRES = IRES/W
Y = IPRED * (1 + EPS(1)) + EPS(2)

$THETA
(0, 0.5)  ;1 CL (L/d)
(0, 20)   ;2 VC (L)

$OMEGA
0.09     ;11 IIV on CL: 30% CV on CL (%CV/100)^2 = sigma_CL^2
0.2025   ;12 IIV on VC: 45% CV on Vc (%CV/100)^2 = sigma_Vc^2

$SIGMA
0.05      ; PROPORTIONAL ERROR
0.05      ; ADDITIVE ERROR

$ESTIMATION METHOD=1 MAXEVAL=9999 PRINT=5 NOABORT

$COV PRINT=E MATRIX=S ;prints eigenvalues of variance-covariance matrix for condition number lambda_n/1

$TABLE LINE ID TIME EVID DV PRED IPRED WRES CWRES IWRES NOPRINT NOAPPEND ONEHEADER FILE=run1001.tab
$TABLE ID ETAS(1:LAST) NOPRINT NOAPPEND ONEHEADER NOTITLE FIRSTONLY FILE=run1001-param.tab

NM-TRAN MESSAGES
 WARNINGS AND ERRORS (IF ANY) FOR PROBLEM    1
 (WARNING  2) NM-TRAN INFERS THAT THE DATA ARE POPULATION.
 (WARNING  79) SIGMA IS USED ON THE RIGHT. WITH A SUBSEQUENT RUN, IF AN
 INITIAL ESTIMATE OF A DIAGONAL BLOCK OF SIGMA IS TO BE COMPUTED BY
 NONMEM, THAT BLOCK WILL BE SET TO AN IDENTITY MATRIX DURING THAT
 COMPUTATION. THIS COULD LEAD TO AN ARITHMETIC EXCEPTION.*
 * THE MAXIMUM NUMBER OF WARNINGS OF ONE OR MORE TYPES WAS REACHED.
 IT IS POSSIBLE THAT SOME WARNING MESSAGES WERE SUPPRESSED.
 LIM VALUES MAXLIM ASSESSED BY NMTRAN: 1,2,3,4,5,6,7,8,10,11,13,15,16
Note: Analytical 2nd Derivatives are constructed in FSUBS but are never used.
      You may insert $ABBR DERIV2=NO after the first $PROB to save FSUBS construction and compilation time

1NONLINEAR MIXED EFFECTS MODEL PROGRAM (NONMEM) VERSION 7.5.1
 ORIGINALLY DEVELOPED BY STUART BEAL, LEWIS SHEINER, AND ALISON BOECKMANN
 CURRENT DEVELOPERS ARE ROBERT BAUER, ICON DEVELOPMENT SOLUTIONS,
 AND ALISON BOECKMANN. IMPLEMENTATION, EFFICIENCY, AND STANDARDIZATION
 PERFORMED BY NOUS INFOSYSTEMS.
 PROBLEM NO.:         1
 NM TRIANING BASE MODEL
 TOT. NO. OF OBS RECS:     1750
 TOT. NO. OF INDIVIDUALS:       50
 GENERAL NONLINEAR KINETICS MODEL (DVERK1, ADVAN6)
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 #TBLN:      1
 #METH: First Order Conditional Estimation
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
 #TERM:
0MINIMIZATION SUCCESSFUL
 NO. OF FUNCTION EVALUATIONS USED:      189
 NO. OF SIG. DIGITS IN FINAL EST.:  4.0
0PARAMETER ESTIMATE IS NEAR ITS BOUNDARY
 THIS MUST BE ADDRESSED BEFORE THE COVARIANCE STEP CAN BE IMPLEMENTED

 ETABAR IS THE ARITHMETIC MEAN OF THE ETA-ESTIMATES,
 AND THE P-VALUE IS GIVEN FOR THE NULL HYPOTHESIS THAT THE TRUE MEAN IS 0.

 ETABAR:         4.2195E-02 -4.9228E-02
 SE:             3.2980E-02  2.6933E-02
 N:                      50          50

 P VAL.:         2.0075E-01  6.7582E-02

 ETASHRINKSD(%)  7.7459E+00  1.4659E+01
 ETASHRINKVR(%)  1.4892E+01  2.7169E+01
 EBVSHRINKSD(%)  4.7496E+00  1.2294E+01
 EBVSHRINKVR(%)  9.2736E+00  2.3077E+01
 RELATIVEINF(%)  9.0459E+01  7.6696E+01
 EPSSHRINKSD(%)  2.3949E+00  2.3949E+00
 EPSSHRINKVR(%)  4.7325E+00  4.7325E+00


 TOTAL DATA POINTS NORMALLY DISTRIBUTED (N):         1750
 N*LOG(2PI) CONSTANT TO OBJECTIVE FUNCTION:    3216.2848662163542
 OBJECTIVE FUNCTION VALUE WITHOUT CONSTANT:    13201.267978719558
 OBJECTIVE FUNCTION VALUE WITH CONSTANT:       16417.552844935912
 REPORTED OBJECTIVE FUNCTION DOES NOT CONTAIN CONSTANT

 TOTAL EFFECTIVE ETAS (NIND*NETA):                           100


 #TERE:
 Elapsed estimation  time in seconds:     4.04
 Elapsed postprocess time in seconds:     0.06

 ********************                        FIRST ORDER CONDITIONAL ESTIMATION                      ********************
 #OBJT:**************                       MINIMUM VALUE OF OBJECTIVE FUNCTION                      ********************
 #OBJV:********************************************    13201.268       **************************************************

 ********************                        FIRST ORDER CONDITIONAL ESTIMATION                      ********************
 ********************                             FINAL PARAMETER ESTIMATE                           ********************

 THETA - VECTOR OF FIXED EFFECTS PARAMETERS   *********
         TH 1      TH 2
         3.82E-01  2.83E+00

 OMEGA - COV MATRIX FOR RANDOM EFFECTS - ETAS  ********
         ETA1      ETA2
 ETA1
+        6.39E-02
 ETA2
+        0.00E+00  4.98E-02

 SIGMA - COV MATRIX FOR RANDOM EFFECTS - EPSILONS  ****
         EPS1      EPS2
 EPS1
+        1.91E-01
 EPS2
+        0.00E+00  5.00E-06

 OMEGA - CORR MATRIX FOR RANDOM EFFECTS - ETAS  *******
         ETA1      ETA2
 ETA1
+        2.53E-01
 ETA2
+        0.00E+00  2.23E-01

 SIGMA - CORR MATRIX FOR RANDOM EFFECTS - EPSILONS  ***
         EPS1      EPS2
 EPS1
+        4.37E-01
 EPS2
+        0.00E+00  2.24E-03
 Elapsed finaloutput time in seconds:     0.07
 #CPUT: Total CPU Time in Seconds,        4.344
